// SBML level 1 version 1

model Tyson1991CellModel()

  // Compartments:
  compartment cell = 1 volume;

  // Species:
  species C2 in cell = 0;
  species CP in cell = 1/cell;
  species $EmptySet in cell = 0;
  species M in cell = 0;
  species Y in cell = 0;
  species YP in cell = 0;
  species pM in cell = 0.3/cell;

  // Parameters:
  Reaction1_k6 = 1;
  Reaction2_k8notP = 1000000;
  Reaction3_k9 = 1000;
  Reaction4_k3 = 200;
  Reaction5_k5notP = 0;
  Reaction6_k1aa = 0.015;
  Reaction7_k2 = 0;
  Reaction8_k7 = 0.6;
  Reaction9_k4 = 180;
  Reaction9_k4prime = 0.018;

  // Reactions:
  Reaction1: M => C2 + YP; Reaction1_k6*M;
  Reaction2: C2 => CP; C2*Reaction2_k8notP;
  Reaction3: CP => C2; CP*Reaction3_k9;
  Reaction4: CP + Y => pM; CP*Reaction4_k3*Y;
  Reaction5: M => pM; Reaction5_k5notP*M;
  Reaction6: $EmptySet => Y; Reaction6_k1aa;
  Reaction7: Y => $EmptySet; Reaction7_k2*Y;
  Reaction8: YP => $EmptySet; Reaction8_k7*YP;
  Reaction9: pM => M; pM*(Reaction9_k4prime + Reaction9_k4*pM^2);
end
