// SBML level 1 version 1

model NovakTyson1997CellModel()

  // Compartments:
  compartment cell = 1 volume;

  // Species:
  species Cdc25 in cell = 0;
  species $EmptySet in cell = 0;
  species G1K in cell = 0;
  species G1R in cell = 0;
  species G2K in cell = 0;
  species G2R in cell = 0;
  species IE in cell = 0;
  species PG2 in cell = 0;
  species PG2R in cell = 0;
  species R in cell = 0;
  species UbE in cell = 0;
  species UbE2 in cell = 0;
  species Wee1 in cell = 0;
  species mass in cell = 0.4/cell;

  // Parameters:
  Reaction1_mu = 0.00495;
  Reaction2_k1 = 0.015;
  Reaction3_V2 = 0.25;
  Reaction3_V2p = 0.0075;
  Reaction4_k3 = 0.09375;
  Reaction5_k4 = 0.1875;
  Reaction6_Vw = 0.35;
  Reaction6_Vwp = 0.035;
  Reaction7_V25 = 0.5;
  Reaction7_V25p = 0.025;
  Reaction8_k7 = 100;
  Reaction9_k7r = 0.1;
  Reaction10_k7 = 100;
  Reaction11_k7r = 0.1;
  Reaction12_Cig1 = 0;
  Reaction12_k0001 = 0;
  Reaction12_Kmp = 0.001;
  Reaction12_kp = 3.25;
  Reaction12_alpha = 0.25;
  Reaction12_beta = 0.05;
  Reaction13_k4 = 0.1875;
  Reaction14_V2 = 0.25;
  Reaction14_V2p = 0.0075;
  Reaction15_k2p = 0.05;
  Reaction15_V2 = 0.25;
  Reaction15_V2p = 0.0075;
  Reaction16_k2p = 0.05;
  Reaction16_V2 = 0.25;
  Reaction16_V2p = 0.0075;
  Reaction17_k4 = 0.1875;
  Reaction18_k4 = 0.1875;
  Reaction19_k5 = 0.00175;
  Reaction20_V6 = 7.5;
  Reaction20_V6p = 0.0375;
  Reaction21_k8 = 10;
  Reaction22_k8r = 0.1;
  Reaction23_k6p = 0;
  Reaction24_k0002 = 0;
  Reaction24_Kmu = 0.01;
  Reaction24_ku = 0.2;
  Reaction25_kc = 1;
  Reaction25_Kmc = 0.1;
  Reaction25_beta = 0.05;
  Reaction26_ki = 0.4;
  Reaction26_Kmi = 0.01;
  Reaction26_beta = 0.05;
  Reaction27_Kmu2 = 0.05;
  Reaction27_ku2 = 1;
  Reaction27_beta = 0.05;
  Reaction28_Kmwr = 0.1;
  Reaction28_kwr = 0.25;
  Reaction29_kir = 0.1;
  Reaction29_Kmir = 0.01;
  Reaction30_Kmur = 0.01;
  Reaction30_kur = 0.1;
  Reaction31_Kmur2 = 0.05;
  Reaction31_kur2 = 0.3;
  Reaction32_Kmw = 0.1;
  Reaction32_kw = 1;
  Reaction32_beta = 0.05;
  Reaction33_kcr = 0.25;
  Reaction33_Kmcr = 0.1;

  // Reactions:
  Reaction1: $EmptySet => mass; Reaction1_mu*mass;
  Reaction10: PG2 + R => PG2R; Reaction10_k7*PG2*R;
  Reaction11: PG2R => PG2 + R; Reaction11_k7r*PG2R;
  Reaction12: R => $EmptySet; R*(Reaction12_k0001 + Reaction12_kp*mass*(Reaction12_Cig1 + Reaction12_alpha*G1K + G2K + Reaction12_beta*PG2))/(Reaction12_Kmp + R);
  Reaction13: G2R => G2K; G2R*Reaction13_k4;
  Reaction14: PG2 => $EmptySet; PG2*(Reaction14_V2p*(1 - UbE) + Reaction14_V2*UbE);
  Reaction15: G2R => R; G2R*(Reaction15_k2p + Reaction15_V2p*(1 - UbE) + Reaction15_V2*UbE);
  Reaction16: PG2R => R; PG2R*(Reaction16_k2p + Reaction16_V2p*(1 - UbE) + Reaction16_V2*UbE);
  Reaction17: PG2R => PG2; Reaction17_k4*PG2R;
  Reaction18: G1R => G1K; G1R*Reaction18_k4;
  Reaction19: $EmptySet => G1K; Reaction19_k5;
  Reaction2: $EmptySet => G2K; Reaction2_k1;
  Reaction20: G1K => $EmptySet; G1K*(Reaction20_V6p*(1 - UbE2) + Reaction20_V6*UbE2);
  Reaction21: G1K + R => G1R; G1K*Reaction21_k8*R;
  Reaction22: G1R => G1K + R; G1R*Reaction22_k8r;
  Reaction23: G1R => R; G1R*Reaction23_k6p;
  Reaction24: $EmptySet => UbE; (Reaction24_k0002 + IE*Reaction24_ku)*(1 - UbE)/(1 + Reaction24_Kmu - UbE);
  Reaction25: $EmptySet => Cdc25; (1 - Cdc25)*Reaction25_kc*(G2K + Reaction25_beta*PG2)/(1 - Cdc25 + Reaction25_Kmc);
  Reaction26: $EmptySet => IE; (1 - IE)*Reaction26_ki*(G2K + Reaction26_beta*PG2)/(1 - IE + Reaction26_Kmi);
  Reaction27: $EmptySet => UbE2; Reaction27_ku2*(1 - UbE2)*(G2K + Reaction27_beta*PG2)/(1 + Reaction27_Kmu2 - UbE2);
  Reaction28: $EmptySet => Wee1; Reaction28_kwr*(1 - Wee1)/(1 + Reaction28_Kmwr - Wee1);
  Reaction29: IE => $EmptySet; IE*Reaction29_kir/(IE + Reaction29_Kmir);
  Reaction3: G2K => $EmptySet; G2K*(Reaction3_V2p*(1 - UbE) + Reaction3_V2*UbE);
  Reaction30: UbE => $EmptySet; Reaction30_kur*UbE/(Reaction30_Kmur + UbE);
  Reaction31: UbE2 => $EmptySet; Reaction31_kur2*UbE2/(Reaction31_Kmur2 + UbE2);
  Reaction32: Wee1 => $EmptySet; Reaction32_kw*Wee1*(G2K + Reaction32_beta*PG2)/(Reaction32_Kmw + Wee1);
  Reaction33: Cdc25 => $EmptySet; Cdc25*Reaction33_kcr/(Cdc25 + Reaction33_Kmcr);
  Reaction4: $EmptySet => R; Reaction4_k3;
  Reaction5: R => $EmptySet; Reaction5_k4*R;
  Reaction6: G2K => PG2; G2K*(Reaction6_Vwp*(1 - Wee1) + Reaction6_Vw*Wee1);
  Reaction7: PG2 => G2K; PG2*(Reaction7_V25p*(1 - Cdc25) + Reaction7_V25*Cdc25);
  Reaction8: G2K + R => G2R; G2K*Reaction8_k7*R;
  Reaction9: G2R => G2K + R; G2R*Reaction9_k7r;
end
