// SBML level 1 version 1

model MAPK_in_Solution()

  // Compartments:
  compartment Cytoplasm = 1 volume;

  // Species:
  species MAPK in Cytoplasm = 0.3/Cytoplasm;
  species MAPKMAPKPH in Cytoplasm = 0;
  species MAPKPH in Cytoplasm = 0.3/Cytoplasm;
  species MAPKp in Cytoplasm = 0;
  species MAPKpMAPKPH in Cytoplasm = 0;
  species MAPKpMEKpp in Cytoplasm = 0;
  species MAPKpp in Cytoplasm = 0;
  species MAPKppMEKpp in Cytoplasm = 0;
  species MEK in Cytoplasm = 0.2/Cytoplasm;
  species MEKMEKPH in Cytoplasm = 0;
  species MEKPH in Cytoplasm = 0.2/Cytoplasm;
  species MEKp in Cytoplasm = 0;
  species MEKpMEKPH in Cytoplasm = 0;
  species MEKpRAFp in Cytoplasm = 0;
  species MEKpp in Cytoplasm = 0;
  species MEKppRAFp in Cytoplasm = 0;
  species RAF in Cytoplasm = 0.4/Cytoplasm;
  species RAFK in Cytoplasm = 0.1/Cytoplasm;
  species RAFPH in Cytoplasm = 0.3/Cytoplasm;
  species RAFRAFK in Cytoplasm = 0;
  species RAFp in Cytoplasm = 0;
  species RAFpRAFPH in Cytoplasm = 0;

  // Parameters:
  Reaction1_a1 = 1;
  Reaction2_d1 = 0.4;
  Reaction3_k1 = 0.1;
  Reaction4_a2 = 0.5;
  Reaction5_d2 = 0.5;
  Reaction6_k2 = 0.1;
  Reaction7_a3 = 3.3;
  Reaction8_d3 = 0.42;
  Reaction9_k3 = 0.1;
  Reaction10_a4 = 10;
  Reaction11_d4 = 0.8;
  Reaction12_k4 = 0.1;
  Reaction13_a5 = 3.3;
  Reaction14_d5 = 0.4;
  Reaction15_k5 = 0.1;
  Reaction16_a6 = 10;
  Reaction17_d6 = 0.8;
  Reaction18_k6 = 0.1;
  Reaction19_a7 = 20;
  Reaction20_d7 = 0.6;
  Reaction21_k7 = 0.1;
  Reaction22_a8 = 5;
  Reaction23_d8 = 0.4;
  Reaction24_k8 = 0.1;
  Reaction25_a9 = 20;
  Reaction26_d9 = 0.6;
  Reaction27_k9 = 0.1;
  Reaction28_a10 = 5;
  Reaction29_d10 = 0.4;
  Reaction30_k10 = 0.1;

  // Reactions:
  Reaction1: RAF + RAFK => RAFRAFK; Reaction1_a1*RAF*RAFK;
  Reaction10: MEKp + RAFp => MEKpRAFp; Reaction10_a4*MEKp*RAFp;
  Reaction11: MEKpRAFp => MEKp + RAFp; Reaction11_d4*MEKpRAFp;
  Reaction12: MEKpRAFp => MEK; Reaction12_k4*MEKpRAFp;
  Reaction13: MEKPH + MEKp => MEKpMEKPH; Reaction13_a5*MEKp*MEKPH;
  Reaction14: MEKpMEKPH => MEKPH + MEKp; Reaction14_d5*MEKpMEKPH;
  Reaction15: MEKpMEKPH => MEKpp; Reaction15_k5*MEKpMEKPH;
  Reaction16: MEKpp + RAFp => MEKppRAFp; Reaction16_a6*MEKpp*RAFp;
  Reaction17: MEKppRAFp => MEKpp + RAFp; Reaction17_d6*MEKppRAFp;
  Reaction18: MEKppRAFp => MEKp; Reaction18_k6*MEKppRAFp;
  Reaction19: MAPK + MAPKPH => MAPKMAPKPH; Reaction19_a7*MAPK*MAPKPH;
  Reaction2: RAFRAFK => RAF + RAFK; Reaction2_d1*RAFRAFK;
  Reaction20: MAPKMAPKPH => MAPK + MAPKPH; Reaction20_d7*MAPKMAPKPH;
  Reaction21: MAPKMAPKPH => MAPKp; Reaction21_k7*MAPKMAPKPH;
  Reaction22: MAPKp + MEKpp => MAPKpMEKpp; Reaction22_a8*MAPKp*MEKpp;
  Reaction23: MAPKpMEKpp => MAPKp + MEKpp; Reaction23_d8*MAPKpMEKpp;
  Reaction24: MAPKpMEKpp => MAPK; Reaction24_k8*MAPKpMEKpp;
  Reaction25: MAPKPH + MAPKp => MAPKpMAPKPH; Reaction25_a9*MAPKp*MAPKPH;
  Reaction26: MAPKpMAPKPH => MAPKPH + MAPKp; Reaction26_d9*MAPKpMAPKPH;
  Reaction27: MAPKpMAPKPH => MAPKpp; Reaction27_k9*MAPKpMAPKPH;
  Reaction28: MAPKpp + MEKpp => MAPKppMEKpp; Reaction28_a10*MAPKpp*MEKpp;
  Reaction3: RAFRAFK => RAFp; Reaction3_k1*RAFRAFK;
  Reaction30: MAPKppMEKpp => MAPKp; Reaction30_k10*MAPKppMEKpp;
  Reaction4: RAFPH + RAFp => RAFpRAFPH; Reaction4_a2*RAFp*RAFPH;
  Reaction5: RAFpRAFPH => RAFPH + RAFp; Reaction5_d2*RAFpRAFPH;
  Reaction6: RAFpRAFPH => RAF; Reaction6_k2*RAFpRAFPH;
  Reaction7: MEK + MEKPH => MEKMEKPH; Reaction7_a3*MEK*MEKPH;
  Reaction8: MEKMEKPH => MEK + MEKPH; Reaction8_d3*MEKMEKPH;
  Reaction9: MEKMEKPH => MEKp; Reaction9_k3*MEKMEKPH;
  Reaction29: MAPKppMEKpp => MAPKpp + MEKpp; Reaction29_d10*MAPKppMEKpp;
end
