// SBML level 3 version 2

model antimony()
  // bistable

  // Compartments:
  compartment default = 1; default is "antimony";

  // Species:
  species g1 in default = 0;
  species g2 in default = 0;
  species s1 in default = 0;
  species s2 in default = 1/default;

  // Parameters:
  __rate_r1 = 0; __rate_r1 is "$$rate_r1";
  __rate_r2 = 0; __rate_r2 is "$$rate_r2";
  __rate_r3 = 0; __rate_r3 is "$$rate_r3";
  __rate_r4 = 0; __rate_r4 is "$$rate_r4";
  k0 = 0.1;
  k1 = 1;
  k2 = 1;
  k3 = 1;
  k4 = 1;
  x = 0;

  // Reactions:
  r1: -> s1; k1*(1 + x)/(1 + k2*s2^2);
  r2: s1 -> ; k0*s1;
  r3: -> s2; k3/(1 + k4*s1^2);
  r4: s2 -> ; k0*s2;
end
