// SBML level 3 version 2

model Toy_Metabolic_Model_xml()
  // New Model_1_1

  // Compartments:
  compartment Intracellular = 1;

  // Species:
  species Energy in Intracellular = 450;
  species Glucose in Intracellular = 15;
  species Lac_Secretion_Rate in Intracellular = 0;
  species Lactate in Intracellular = 0;
  species Oxygen in Intracellular = 0.8;
  species Transition_Rate in Intracellular = 0;
  species apoptosis_rate in Intracellular = 0;
  species migration_speed in Intracellular = 0;

  // Parameters:
  energy_death_thresh = 430;
  energy_prolif_thresh = 445;
  k_aer = 0.01;
  k_ane = 1.8e-4;
  k_usage = 0.0023;
  oxygen_thresh = 440; oxygen_thresh is "energy_move_thresh";

  // Reactions:
  Aerobic: Glucose + 6 Oxygen => 38 Energy; Intracellular*k_aer*Glucose*Oxygen^6;
  Anaerobic: Glucose => 2 Energy + Lactate; Intracellular*k_ane*Glucose;
  Energy_Usage: Energy => ; Intracellular*k_usage*Energy;

  // Events:
  Lac_Sec: at (Lactate > 0.01): Lac_Secretion_Rate = 1e-4;
  die: at (Energy < energy_death_thresh): apoptosis_rate = 9e99;
  divide: at (Energy > energy_prolif_thresh): Transition_Rate = 1.666666e-4;
  do_not_divide: at (Energy < energy_prolif_thresh): Transition_Rate = 0;
  do_not_move: at (Energy > oxygen_thresh): migration_speed = 0;
  move: at (Energy < oxygen_thresh): migration_speed = 10;

  // Unit definitions:
  unit area = (1e-6 metre)^2;
  unit volume = 1e-3 litre;
  unit substance = 1e-3 mole;
  unit length = 1e-6 metre;
  unit time = 60 second;
end
