// SBML level 3 version 1

model SBGNtest()

  // Compartments:
  compartment SBGNtest;
  compartment compartment = 4 litre;
  compartment compartment_nestedComp = 0;

  // Species:
  species MacroMolecule in SBGNtest = 1;
  species NucleicAcid in SBGNtest = 2/SBGNtest;
  species SimpleChemical in SBGNtest = 0;
  species $Unspecified in SBGNtest = 3/SBGNtest;
  species $compartment_PerturbingAgent in compartment = 5;
  species compartment_SimpleChemical in compartment = 6/compartment;
  species compartment_complex1 in compartment = 0;
  species compartment_nestedComp_complex2 in compartment_nestedComp = 0;

  // Parameters:
  k1 = 0;
  k2 = 0;
  m = 0;
  null = 0;
  param2 = 0;
  unknown = 0;

  // Assignment rules:
  param1 := sin(NucleicAcid) + MacroMolecule^3;

  // Rate rules:
  compartment_PerturbingAgent' = param2;

  // Algebraic rules:
  0 = param2*param1 - Unspecified;

  // Reactions:
  Unspecified_SimpleChemical: 2 $Unspecified => compartment_SimpleChemical; 0; Unspecified_SimpleChemical is "Unspecified -> SimpleChemical";
  complex1_complex2: compartment_complex1 => compartment_nestedComp_complex2; param2; complex1_complex2 is "complex1 -> complex2";
  complex2: compartment_nestedComp_complex2 => ; 0; complex2 is "complex2 ->";
  reaction: NucleicAcid => MacroMolecule; k2*NucleicAcid; reaction is "NucleicAcid -> MacroMolecule";
  SimpleChemical_NucleicAcid: compartment_SimpleChemical => NucleicAcid; 0; SimpleChemical_NucleicAcid is "SimpleChemical -> NucleicAcid";
  PerturbingAgent_Unspecified: $compartment_PerturbingAgent => $Unspecified; 0; PerturbingAgent_Unspecified is "PerturbingAgent -> Unspecified";
  reaction_4: MacroMolecule => ; k1*MacroMolecule; reaction_4 is "MacroMolecule ->";
  PerturbingAgent: => $compartment_PerturbingAgent; 0; PerturbingAgent is "-> PerturbingAgent";

  // Events:
  as: at (param1 >= 10): null = 1;
end
