// SBML level 2 version 2

model EnzymaticReaction()

  // Compartments:
  compartment m1 in cell = 0.013;
  compartment m2 in cell = 0.013;
  compartment m3 in cell = 0.013;
  compartment m4 in cell = 0.013;
  compartment cell = 190;
  compartment cytosol = 1e-14;

  // Species:
  species ES in cytosol = 0;
  species P in cytosol = 0;
  species S in cytosol = 1e-20/cytosol;
  species E in cytosol = 5e-21/cytosol;

  // Assignment rules:
  k := k3/k2;
  s2 := k*x/(1 + k2);
  A := 0.1*x;

  // Reactions:
  veq: E + S -> ES; cytosol*(kon*E*S - koff*ES);
    kon = 1000000; koff = 0.2;
  vcat: ES => E + P; cytosol*kcat*ES;
    kcat = 0.1;
end
