// SBML level 2 version 1

model EnzymaticReaction()

  // Compartments:
  compartment cell = 190 volume;
  compartment cytosol = 1e-14 volume;
  compartment m1 = 0.013 volume;
  compartment m2 = 0.013 volume;
  compartment m3 = 0.013 volume;
  compartment m4 = 0.013 volume;

  // Species:
  species cytosol_E in cytosol = 5e-21/cytosol;
  species cytosol_ES in cytosol = 0;
  species cytosol_P in cytosol = 0;
  species cytosol_S in cytosol = 1e-20/cytosol;

  // Parameters:
  time_ = 0;
  veq_kon = 1000000;
  veq_koff = 0.2;
  vcat_kcat = 0.1;

  // Reactions:
  vcat: cytosol_ES => cytosol_E + cytosol_P; cytosol*vcat_kcat*cytosol_ES;
  veq: cytosol_E + cytosol_S -> cytosol_ES; cytosol*(veq_kon*cytosol_E*cytosol_S - veq_koff*cytosol_ES);
end
