// SBML level 1 version 1

model untitled()

  // Compartments:
  compartment uVol = 1;

  // Species:
  species $Src in uVol = 0;
  species RNAP in uVol = 0,66/uVol;
  species $Waste in uVol = 0;
  species RNAnuc in uVol = 96/uVol;
  species mRNAnuc in uVol = 0,003/uVol;
  species mRNAcyt in uVol = 3,8/uVol;
  species RNAcyt in uVol = 0,005/uVol;
  species AA in uVol = 90,465/uVol;
  species P in uVol = 20/uVol;

  // Reactions:
  J0: $Src => RNAP; Vi/(1 + P/Ki);
    Vi = 10; Ki = 0,6;
  J1: RNAP => $Waste; Vkd*RNAP;
    Vkd = 1;
  J2: RNAnuc => mRNAnuc; Vm1*RNAnuc*RNAP/(Km1 + RNAnuc);
    Vm1 = 50; Km1 = 1;
  J3: mRNAnuc => mRNAcyt; k1*mRNAnuc;
    k1 = 100;
  J4: mRNAcyt => RNAcyt; Vm2*mRNAcyt/(mRNAcyt + Km2);
    Vm2 = 50; Km2 = 0,5;
  J5: RNAcyt => RNAnuc; k2*RNAcyt;
    k2 = 100;
  J6: AA => P; Vm3*mRNAcyt*AA/(AA + Km3);
    Vm3 = 50; Km3 = 80;
  J7: P => AA; Vm4*P/(P + Km4);
    Vm4 = 50; Km4 = 1;
end
