// SBML level 2 version 4

model Goldbeter1991_MinMitOscil()
  // This a model from the article:
  // A minimal cascade model for the mitotic oscillator involving cyclin and cdc2 kinase.
  // Goldbeter A Proc. Natl. Acad. Sci. U.S.A. 1991:88(20):9107-11 1833774,
  // Abstract:
  // A minimal model for the mitotic oscillator is presented. The model, built on recent experimental advances, is based on the cascade of post-translational modification that modulates the activity of cdc2 kinase during the cell cycle. The model pertains to the situation encountered in early amphibian embryos, where the accumulation of cyclin suffices to trigger the onset of mitosis. In the first cycle of the bicyclic cascade model, cyclin promotes the activation of cdc2 kinase through reversible dephosphorylation, and in the second cycle, cdc2 kinase activates a cyclin protease by reversible phosphorylation. That cyclin activates cdc2 kinase while the kinase triggers the degradation of cyclin has suggested that oscillations may originate from such a negative feedback loop [Félix, M. A., Labbé, J. C., Dorée, M., Hunt, T. & Karsenti, E. (1990) Nature (London) 346, 379-382]. This conjecture is corroborated by the model, which indicates that sustained oscillations of the limit cycle type can arise in the cascade, provided that a threshold exists in the activation of cdc2 kinase by cyclin and in the activation of cyclin proteolysis by cdc2 kinase. The analysis shows how miototic oscillations may readily arise from time lags associated with these thresholds and from the delayed negative feedback provided by cdc2-induced cyclin degradation. A mechanism for the origin of the thresholds is proposed in terms of the phenomenon of zero-order ultrasensitivity previously described for biochemical systems regulated by covalent modification.
  // This is a Systems Biology Markup Language (SBML) file, generated by MathSBML 2.4.6 (14-January-2005) 14-January-2005 18:33:39.806932. SBML is a form of XML, and most XML files will not display properly in an internet browser. To view the contents of an XML file use the "Page Source" or equivalent button on you browser.
  // This model originates from BioModels Database: A Database of Annotated Published Models (http://www.ebi.ac.uk/biomodels/). It is copyright (c) 2005-2010 The BioModels.net Team.
  // For more information see the terms of use.
  // To cite BioModels Database, please use: Li C, Donizelli M, Rodriguez N, Dharuri H, Endler L, Chelliah V, Li L, He E, Henry A, Stefan MI, Snoep JL, Hucka M, Le Novère N, Laibe C (2010) BioModels Database: An enhanced, curated and annotated resource for published quantitative kinetic models. BMC Syst Biol., 4:92.
  // biomodels.db:BIOMD0000000003 biomodels.db:MODEL6614271263
  // isHomologTo reactome:REACT_152
  // isVersionOf kegg.pathway:hsa04110 GO:0000278
  // occursIn taxonomy:8292
  // isDescribedBy pubmed:1833774

  // Compartments:
  compartment cell = 1 volume;  // GO:0005623

  // Species:
  species cell_C in cell = 0.01/cell;  // substance in substance/cubical meter; isVersionOf uniprot:Q4KLA0 interpro:IPR006670
  species cell_M in cell = 0.01/cell;  // substance in substance/cubical meter; hasVersion uniprot:P24033 uniprot:P35567
  species cell_X in cell = 0.01/cell;  // substance in substance/cubical meter; isVersionOf GO:0005680; hasVersion reactome:REACT_7165.1
  // BioUML allows user create reactions without reactants or products.
  // However reactant and product are obligatory elements of SBML reaction.
  // To respect this requrement stubs for reactant or product are generated.
  species $_in_empty_set in cell = 0;
  // BioUML allows user create reactions without reactants or products.
  // However reactant and product are obligatory elements of SBML reaction.
  // To respect this requrement stubs for reactant or product are generated.
  species $_out_empty_set in cell = 0;

  // Parameters:
  time_ = 0;
  // VM1
  VM1 = 3;
  // VM3
  VM3 = 1;
  // Kc
  Kc = 0.5;
  reaction1_vi = 0.025;
  reaction2_kd = 0.01;
  reaction3_vd = 0.25;
  reaction3_Kd = 0.02;
  reaction4_K1 = 0.005;
  reaction5_V2 = 1.5;
  reaction5_K2 = 0.005;
  reaction6_K3 = 0.005;
  reaction7_K4 = 0.005;
  reaction7_V4 = 0.5;

  // Assignment rules:
  V1 := cell_C*VM1*(cell_C + Kc)^(-1);
  V3 := cell_M*VM3;

  // Reactions:
  reaction1: $_in_empty_set => cell_C; cell*reaction1_vi;  // isVersionOf GO:0006412
  reaction2: cell_C => $_out_empty_set; cell_C*cell*reaction2_kd;  // isVersionOf GO:0008054
  reaction3: cell_C => $_out_empty_set; cell_C*cell*reaction3_vd*cell_X*(cell_C + reaction3_Kd)^(-1);  // modifiers: cell_X; isVersionOf GO:0008054
  reaction4: $_in_empty_set => cell_M; cell*(1 + (-1*cell_M))*V1*(reaction4_K1 + (-1*cell_M) + 1)^(-1);  // isVersionOf ec-code:3.1.3.16 GO:0045737 GO:0006470
  reaction5: cell_M => $_out_empty_set; cell*cell_M*reaction5_V2*(reaction5_K2 + cell_M)^(-1);  // isVersionOf ec-code:2.7.10.2 GO:0045736 GO:0006468
  reaction6: $_in_empty_set => cell_X; cell*V3*(1 + (-1*cell_X))*(reaction6_K3 + (-1*cell_X) + 1)^(-1);
  reaction7: cell_X => $_out_empty_set; cell*reaction7_V4*cell_X*(reaction7_K4 + cell_X)^(-1);
end
