// SBML level 2 version 3

model mapk.xml()

  // Compartments:
  compartment Cell;

  // Species:
  substanceOnly species L in Cell = 680;
  substanceOnly species R in Cell = 100;
  substanceOnly species C in Cell = 0;
  substanceOnly species C2 in Cell = 0;
  substanceOnly species C_ in Cell = 0;
  substanceOnly species A1 in Cell = 85;
  substanceOnly species A2 in Cell = 34;
  substanceOnly species E1 in Cell = 180;
  substanceOnly species E2 in Cell = 180;
  substanceOnly species E3 in Cell = 180;
  substanceOnly species E4 in Cell = 180;
  substanceOnly species E5 in Cell = 180;
  substanceOnly species P1 in Cell = 90;
  substanceOnly species P2 in Cell = 90;
  substanceOnly species P3 in Cell = 90;
  substanceOnly species P4 in Cell = 90;
  substanceOnly species P5 in Cell = 90;
  substanceOnly species E0_ in Cell = 0;
  substanceOnly species E1_ in Cell = 0;
  substanceOnly species E2_ in Cell = 0;
  substanceOnly species E3_ in Cell = 0;
  substanceOnly species E4_ in Cell = 0;
  substanceOnly species E5_ in Cell = 0;
  substanceOnly species A2__ in Cell = 0;
  substanceOnly species E2__ in Cell = 0;
  substanceOnly species C_A1 in Cell = 0;
  substanceOnly species A1A2 in Cell = 0;
  substanceOnly species E1E0_ in Cell = 0;
  substanceOnly species E1_P1 in Cell = 0;
  substanceOnly species E2E1_ in Cell = 0;
  substanceOnly species E2_P2 in Cell = 0;
  substanceOnly species E3E2_ in Cell = 0;
  substanceOnly species E3_P3 in Cell = 0;
  substanceOnly species E4E3_ in Cell = 0;
  substanceOnly species E4_P4 in Cell = 0;
  substanceOnly species E5E4_ in Cell = 0;
  substanceOnly species E5_P5 in Cell = 0;
  substanceOnly species E0_E4_ in Cell = 0;
  substanceOnly species E2_E4_ in Cell = 0;

  // Reactions:
  L+R__>C: L + R => C; 0.003*L*R;
  C__>L+R: C => L + R; 0.06*C;
  C+C__>C2: C + C => C2; 0.01*C*(C - 1)*0.5;
  C2__>C+C: C2 => C + C; 0.1*C2;
  C2__>C_: C2 => C_; 1*C2;
  C___>C2: C_ => C2; 0.01*C_;
  C_+A1__>C_A1: C_ + A1 => C_A1; 0.003*C_*A1;
  C_A1__>C_+A1: C_A1 => C_ + A1; 0.05*C_A1;
  C_A1+A2__>E0_: C_A1 + A2 => E0_; 0.01*C_A1*A2;
  E0___>C_A1+A2: E0_ => C_A1 + A2; 0.06*E0_;
  A1+A2__>A1A2: A1 + A2 => A1A2; 0.0001*A1*A2;
  A1A2__>A1+A2: A1A2 => A1 + A2; 0.0015*A1A2;
  C_+A1A2__>E0_: C_ + A1A2 => E0_; 0.0045*C_*A1A2;
  E0___>C_+A1A2: E0_ => C_ + A1A2; 0.03*E0_;
  E1+E0___>E1E0_: E1 + E0_ => E1E0_; 0.01*E1*E0_;
  E1E0___>E1+E0_: E1E0_ => E1 + E0_; 0.5*E1E0_;
  E1E0___>E0_+E1_: E1E0_ => E0_ + E1_; 0.1*E1E0_;
  E1_+P1__>E1_P1: E1_ + P1 => E1_P1; 0.01*E1_*P1;
  E1_P1__>E1_+P1: E1_P1 => E1_ + P1; 0.5*E1_P1;
  E1_P1__>P1+E1: E1_P1 => P1 + E1; 0.1*E1_P1;
  E2+E1___>E2E1_: E2 + E1_ => E2E1_; 0.01*E2*E1_;
  E2E1___>E2+E1_: E2E1_ => E2 + E1_; 0.5*E2E1_;
  E2E1___>E1_+E2_: E2E1_ => E1_ + E2_; 0.1*E2E1_;
  E2_+P2__>E2_P2: E2_ + P2 => E2_P2; 0.01*E2_*P2;
  E2_P2__>E2_+P2: E2_P2 => E2_ + P2; 0.5*E2_P2;
  E2_P2__>P2+E2: E2_P2 => P2 + E2; 0.1*E2_P2;
  E3+E2___>E3E2_: E3 + E2_ => E3E2_; 0.01*E3*E2_;
  E3E2___>E3+E2_: E3E2_ => E3 + E2_; 0.5*E3E2_;
  E3E2___>E2_+E3_: E3E2_ => E2_ + E3_; 0.1*E3E2_;
  E3_+P3__>E3_P3: E3_ + P3 => E3_P3; 0.01*E3_*P3;
  E3_P3__>E3_+P3: E3_P3 => E3_ + P3; 0.5*E3_P3;
  E3_P3__>P3+E3: E3_P3 => P3 + E3; 0.1*E3_P3;
  E4+E3___>E4E3_: E4 + E3_ => E4E3_; 0.01*E4*E3_;
  E4E3___>E4+E3_: E4E3_ => E4 + E3_; 0.5*E4E3_;
  E4E3___>E3_+E4_: E4E3_ => E3_ + E4_; 0.1*E4E3_;
  E4_+P4__>E4_P4: E4_ + P4 => E4_P4; 0.01*E4_*P4;
  E4_P4__>E4_+P4: E4_P4 => E4_ + P4; 0.5*E4_P4;
  E4_P4__>P4+E4: E4_P4 => P4 + E4; 0.1*E4_P4;
  E5+E4___>E5E4_: E5 + E4_ => E5E4_; 0.01*E5*E4_;
  E5E4___>E5+E4_: E5E4_ => E5 + E4_; 0.5*E5E4_;
  E5E4___>E4_+E5_: E5E4_ => E4_ + E5_; 0.1*E5E4_;
  E5_+P5__>E5_P5: E5_ + P5 => E5_P5; 0.01*E5_*P5;
  E5_P5__>E5_+P5: E5_P5 => E5_ + P5; 0.5*E5_P5;
  E5_P5__>P5+E5: E5_P5 => P5 + E5; 0.1*E5_P5;
  E0_+E4___>E0_E4_: E0_ + E4_ => E0_E4_; 0.01*E0_*E4_;
  E0_E4___>E0_+E4_: E0_E4_ => E0_ + E4_; 0.5*E0_E4_;
  E0_E4___>E4_+C_A1+A2__: E0_E4_ => E4_ + C_A1 + A2__; 0.1*E0_E4_;
  E2_+E4___>E2_E4_: E2_ + E4_ => E2_E4_; 0.01*E2_*E4_;
  E2_E4___>E2_+E4_: E2_E4_ => E2_ + E4_; 0.5*E2_E4_;
  E2_E4___>E4_+E2__: E2_E4_ => E4_ + E2__; 0.1*E2_E4_;
end
